Waight := 25  # Kg
Heating_capacity_water := 4182
Heat_from := 24  # Degree
Heating_capacity_salt_water := 3993
Heat_to := 25  # Degree
Time := 3600  # Seconds
Effencity := 100  # percentage
Effect_Loss_by_tank := 25  # Watt
Watt := Waight*((Heat_to - Heat_from)*Heating_capacity_water)/Time = 29.0417
Watt_Requeired_Water := Watt + (Watt - (Watt/100*Effencity)) = 29.0417
Watt_requeired := Watt_Requeired_Water + Effect_Loss_by_tank = 54.0417
Watt_requeired = 54.0417
# Watt
Watt/Watt_requeired*100 = 53.7394
# Link: https://sciencing.com/convert-btu-fahrenheit-10039191.html
# FUCK MIG : http://nexusstem.co.uk/wp-content/uploads/2017/01/Queensland-Academies-1.pdf
# https://www.hamzasreef.com/Contents/Calculators/HeaterChillerSizing.php
