f_osc := 20.48 MHz  # 16-bit
prescale := 512
2^16 = 65536
f_clock := f_osc/prescale = 40 kHz
delay := 1/f_osc*prescale*40000 = 1 s
T_clock := 1/f_clock = 25 μs
ave_fail := 0.5/10^6
aging_first_year := 5/10^6
# Driftsberegninger:
f_osc_drift := (1 + ave_fail)*f_osc = 20.48 MHz
f_osc_drift2 := (1 - ave_fail)*f_osc = 20.48 MHz
delay_drift1 := 1/f_osc_drift*prescale*40000 = 1 s
delay_drift2 := 1/f_osc_drift*prescale*40000 = 1 s
(1 s - delay_drift1)*60*60*24*365.25 = 15.7788 s
(1 s - delay_drift2)*60*60*24*365.25 = 15.7788 s
# Og aldring på et år:
f_osc_drift := (1 + aging_first_year)*f_osc = 20.4801 MHz
delay_drift3 := 1/f_osc_drift*prescale*40000 = 0.999995 s
# Altså:
y1 := (1 s - delay_drift1)*60*60*24*365.25 = 15.7788 s
y2 := (1 s - delay_drift2)*60*60*24*365.25 = 15.7788 s
y3 := (1 s - delay_drift3)*60*60*24*365.25 = 157.787 s
# Tråde med antaget 2.5 ms pr. cycle:
# el:
2.5*ms/s*60*s/minut*60*minut/time*24*time*365.25 =  # error: This variable is undefined. Check that the label is set correctly.
1 s/(2.5 ms) = 400
sec_pr_aar := 365.25 s*60*60*24 = 31557600 s
drift := 2.5 ms*365.25*60*60*24 = 78894 s
sec_pr_aar/drift = 400
