Ts := 1
pre_error := 1
pre_integral := 1
error := 1
Kp := 1
Ti := 1
X(z) := 1
z := 1
Y(z) := 1
# Integrale og proportional i kontinuær tid
# Man kan sætte en PI regulator op sådan her
integral := 1/s
proportional := 1
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# Integrale og proportional i diskret tid (Bilinærtransformation)
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integrale := Ts/2*(1 + z^-1)/(1 - z^-1)  # error: This expression is divided by zero. It cannot be computed.
proportional := 1
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# Differensligning
# differensligning for blokdiagrammet findes
# proportional:
proportional := Y(z)/X(z) == 1
# integrale:
Y(z)/X(z) == Ts/2*(1 + z^-1)/(1 - z^-1)
Y(z)*(1 - z^-1) == Ts/2*(1 + z^-1)*X(z)
Y(z) - Y(z)*z^-1 == Ts/2*(X(z) + X(z)*z^-1)
Y(z) == Ts/2*(X(z) + X(z)*z^-1) + Y(z)*z^-1
# Z transformation
y(n) := Ts/2*(x(n) + x(n - 1)) + y(n - 1)  # error: This variable is undefined. Check that the label is set correctly.
# Blokdiagram som differensligning
# x tilsvare error
# y tilsvare integrale
# n tilsvare den aktuelle
# n-1 tilsvare den sidste målt/udregne
integral := Ts/2*(error + pre_error) + pre_integral
proportional := error
controlSignal := Kp*(proportional + 1/Ti*integral)
integral := Ts/2*(error + pre_error) + pre_integral
proportional := error
controlSignal := Kp*(proportional + 1/Ti*integral)
