Watt := 45
Effeciency := 1.25  # giver effektivitet på 75%
Litter := 25
V_v := 4168  # Vandets varmekapacitet
Grader_endring := 1
Time_mtab := Effeciency*((((Litter*Grader_endring*V_v)/Watt)/60)/60) = 0.804012  # Timer  # Med tab
Time_utab := ((((Litter*Grader_endring*V_v)/Watt)/60)/60) = 0.64321  # Timer  # Uden tab
# Link: https://gettopics.com/en/calc/water-heating-time
