Drift := 0.0001 s  # drift pr. period
# TEST | VIRKELIGT
T1 := 10 s
T2 := 900 s
Per_dag1 := 60*60*24 s/T1 = 8640
Per_dag2 := 60*60*24 s/T2 = 96
DagligDrift1 := Drift*Per_dag1 = 0.864 s
DagligDrift2 := Drift*Per_dag2 = 9.6 ms
# Forhold mellem test og virkelighed:
Forhold := Per_dag1/Per_dag2 = 90
# Et års test ville tage:
365/Forhold = 4.05556  # dage
3.504 s/4.056 = 0.863905 s  # pr. dag
DagligDrift1*365/Forhold = 3.504 s
